// COMSOL Multiphysics 5.4.0.388 model "mhi_reactor.mph"
// Outline of the model tree

Geometry
  geom1 "Geometry 1" (1D, length unit m)
    i1: Interval "Reactor Length" | coord = {0, 0.011}
    fin: Finalize "Form Union"

Physics
  chem: Chemistry "Reactor Length Chemistry" on all domains
    TPFeatureInput.ShowRefPressure = 0
    TPFeatureInput.T = Tr
    TPFeatureInput.p_src = userdef
    TPFeatureInput.p = P_feed
    calcTransport.calcTransport = 1
    calcTransport.heatCapacitySel = Automatic
    specNumbering.specNumbering = on
    chemkin.thermo = /home/stohr.a/HAN/HAN/COMSOL/chemkin/chem_annotated-gas_really_big.inp
    chemkin.transport = /home/stohr.a/HAN/HAN/COMSOL/chemkin/tran.dat
    rgr1: ReversibleReactionGroup on all domains
      rsSequenceNo = {1, 2, 3, 4, 5, 6, 7, 8, 9, 10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}
      fwdSpecies = {NO2_9_+NO2_9_, NO_10_+N2O_11_, NO2_9_+CO_14_, N2O_11_+CO_14_, H_20_+CH2O_17_, H_20_+CH4_15_, CH2O_17_+CH3_18_, H_20_+HNO3_4_, N2_7_+H_20_+H_20_, H_20_+H_20_+H2_13_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}
      revSpecies = {O2_8_+NO_10_+NO_10_, NO2_9_+N2_7_, NO_10_+CO2_12_, N2_7_+CO2_12_, H_20_+H2_13_+CO_14_, H2_13_+CH3_18_, H_20_+CO_14_+CH4_15_, NO2_9_+H2O_6_, N2_7_+H2_13_, H2_13_+H2_13_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}
      Af = {4500000.0, 0.53, 9.0E7, 270000.0, 1.0E-6, 0.0041, 190000.0, 6.1E-5, 5400000.0, 100000.0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}
      nf = {0.0, 2.23, 0.0, 0.0, 0.0, 3.156, 0.887, 3.3, -1.3, -0.6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}
      Ef = {115474.216, 193635.52000000002, 141419.19999999998, 84671.608, 0.0, 36630.920000000006, 101353.216, 26296.440000000002, 0.0, 0.0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}
      Ar = {1, 1, 1, 1, 1, 1, 1, 1, 1, 1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}
      nr = {0, 0, 0, 0, 0, 0, 0, 0, 0, 0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}
      Er = {0, 0, 0, 0, 0, 0, 0, 0, 0, 0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}
      Keq0dep = {1, 1, 1, 1, 1, 1, 1, 1, 1, 1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}
      kf = {0, 0, 0, 0, 0, 0, 0, 0, 0, 0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}
      reactionRate = {chem.kf_cr1*chem.c_NO2_9_^2-chem.kr_cr1*chem.c_O2_8_*chem.c_NO_10_^2, chem.kf_cr2*chem.c_NO_10_*chem.c_N2O_11_-chem.kr_cr2*chem.c_NO2_9_*chem.c_N2_7_, chem.kf_cr3*chem.c_NO2_9_*chem.c_CO_14_-chem.kr_cr3*chem.c_NO_10_*chem.c_CO2_12_, chem.kf_cr4*chem.c_N2O_11_*chem.c_CO_14_-chem.kr_cr4*chem.c_N2_7_*chem.c_CO2_12_, chem.c_H_20_*(chem.kf_cr5*chem.c_CH2O_17_-chem.kr_cr5*chem.c_H2_13_*chem.c_CO_14_), chem.kf_cr6*chem.c_H_20_*chem.c_CH4_15_-chem.kr_cr6*chem.c_H2_13_*chem.c_CH3_18_, chem.kf_cr7*chem.c_CH2O_17_*chem.c_CH3_18_-chem.kr_cr7*chem.c_H_20_*chem.c_CO_14_*chem.c_CH4_15_, chem.kf_cr8*chem.c_H_20_*chem.c_HNO3_4_-chem.kr_cr8*chem.c_NO2_9_*chem.c_H2O_6_, chem.c_N2_7_*(chem.kf_cr9*chem.c_H_20_^2-chem.kr_cr9*chem.c_H2_13_), chem.kf_cr10*chem.c_H_20_^2*chem.c_H2_13_-chem.kr_cr10*chem.c_H2_13_^2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}
      thirdBody = {0, 0, 0, 0, 0, 0, 0, 0, 0, 0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}
      chemkin = 1
      Species = {H2O_6_, CHNO2_393_, H2N2_97_, CH3OO_48_, OH_24_, CH3CO_64_, S_124_, C2H4N_148_, C2H4O_65_, C2H6N_139_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}
      tableRow = 1630
      kinetics = /home/stohr.a/HAN/HAN/COMSOL/chemkin/chem_annotated-gas_really_big.inp
    sg_rgr1: SpeciesGroup on all domains
      rsSequenceNo = {1, 2, 3, 4, 5, 6, 7, 8, 9, 10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}
      Species = {NO2_9_, NO_10_, N2O_11_, CO_14_, H_20_, CH2O_17_, CH4_15_, CH3_18_, HNO3_4_, N2_7_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}
      MolarWeight = {0.0460055, 0.0300061, 0.0440128, 0.0280104, 0.00100794, 0.03002628, 0.01604276, 0.01503482, 0.06301284, 0.0280134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}
      Density = {1[kg/m^3], 1[kg/m^3], 1[kg/m^3], 1[kg/m^3], 1[kg/m^3], 1[kg/m^3], 1[kg/m^3], 1[kg/m^3], 1[kg/m^3], 1[kg/m^3]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}
      Charge = {0, 0, 0, 0, 0, 0, 0, 0, 0, 0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}
      epsilonkb = {333.59, 139.32, 232.4, 91.7, 145.0, 498.0, 141.4, 144.0, 400.0, 97.53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}
      mu = {0.4, 0.2, 0.2, 0.0, 0.0, 0.0, 0.0, 0.0, 0.2, 0.0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}
      sigma = {3.852e-10[m], 3.339e-10[m], 3.828e-10[m], 3.69e-10[m], 2.05e-10[m], 3.59e-10[m], 3.746e-10[m], 3.8e-10[m], 4.2e-10[m], 3.621e-10[m]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}
      k = {0.015[W/(m*K)], 0.015[W/(m*K)], 0.015[W/(m*K)], 0.015[W/(m*K)], 0.015[W/(m*K)], 0.015[W/(m*K)], 0.015[W/(m*K)], 0.015[W/(m*K)], 0.015[W/(m*K)], 0.015[W/(m*K)]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}
      tableRow = 176
      transport = /home/stohr.a/HAN/HAN/COMSOL/chemkin/tran.dat
      sthm1: SpeciesThermodynamics on all domains
        TypeSelection = NASA
        speSequence = {1, 2, 3, 4, 5, 6, 7, 8, 9, 10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}
        Species = {NO2_9_, NO_10_, N2O_11_, CO_14_, H_20_, CH2O_17_, CH4_15_, CH3_18_, HNO3_4_, N2_7_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}
        SpeciesThermoTlo = {100.0, 100.0, 100.0, 100.0, 100.0, 100.0, 100.0, 100.0, 100.0, 200.0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}
        SpeciesThermoTmid = {1003.6, 1407.0, 1026.6, 1571.6, 4383.1, 1070.4, 1084.1, 697.6, 964.7, 1000.0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}
        SpeciesThermoThi = {5000.0, 5000.0, 5000.0, 5000.0, 5000.0, 5000.0, 5000.0, 5000.0, 5000.0, 6000.0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}
        SpeciesThermoaLo1 = {3.95017408, 3.55718287, 3.22183369, 3.56837982, 2.5, 4.12927829, 4.20540072, 3.96043178, 3.37979722, 3.53101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}
        SpeciesThermoaLo2 = {-0.00110886044, -8.90585197E-4, 0.00441469432, -8.52124063E-4, -2.38914167E-13, -0.00408401633, -0.0053554064, 5.92930195E-4, 0.00707791351, -1.23661E-4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}
        SpeciesThermoaLo3 = {1.34099668E-5, 2.98557151E-6, 2.54409227E-6, 2.4891739E-6, 3.12709494E-16, 2.03229448E-5, 2.51117636E-5, 8.78578951E-6, 1.89739812E-5, -5.02999E-7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}
        SpeciesThermoaLo4 = {-1.53105837E-8, -2.08691596E-9, -6.06073232E-9, -1.56330672E-9, -1.3336732E-19, -1.83524377E-8, -2.1375591E-8, -9.88035524E-9, -3.13218649E-8, 2.43531E-9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}
        SpeciesThermoaLo5 = {5.31009534E-12, 4.65962924E-13, 2.4509203E-12, 3.13594213E-13, 1.74989654E-23, 5.3797606E-12, 5.97496145E-12, 3.63236942E-12, 1.27351678E-11, -1.40881E-12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}
        SpeciesThermoaLo6 = {2973.29533, 9952.39678, 8765.76974, -14284.2549, 25474.2178, -14429.464, -10161.9427, 16421.8817, -17410.262, -1046.98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}
        SpeciesThermoaLo7 = {6.19456759, 4.55250983, 6.72928681, 3.57912239, -0.444972897, 3.22418365, -0.921226951, 0.339862787, 10.1297081, 2.96747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}
        SpeciesThermoaHi1 = {4.42985754, 2.93795514, 4.61742784, 2.91306987, 2.50003447, 2.21172293, 0.908349401, 3.09511262, 8.17854972, 2.95258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}
        SpeciesThermoaHi2 = {0.00284579572, 0.00175427954, 0.00300864963, 0.00164657389, -3.04996987E-8, 0.00794265924, 0.0114539479, 0.00555429714, 0.00361026767, 0.0013969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}
        SpeciesThermoaHi3 = {-1.26848228E-6, -7.77024161E-7, -1.29224172E-6, -6.8861282E-7, 1.01101187E-11, -3.34193191E-6, -4.57166053E-6, -1.88158748E-6, -1.17844592E-6, -4.92632E-7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}
        SpeciesThermoaHi4 = {2.63842092E-10, 1.4265604E-10, 2.55914757E-10, 1.2103693E-10, -1.48796738E-15, 6.28471724E-10, 8.29173612E-10, 3.13334732E-10, 2.5581329E-10, 7.8601E-11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}
        SpeciesThermoaHi5 = {-2.02206262E-14, -9.57872631E-15, -1.88714262E-14, -7.84014743E-15, 8.2035617E-20, -4.40431711E-14, -5.66300105E-14, -2.05194931E-14, -2.19834015E-14, -4.60755E-15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}
        SpeciesThermoaHi6 = {2581.55693, 10039.1035, 8266.77203, -14180.8862, 25474.1866, -14297.445, -9720.0111, 16542.619, -19100.7121, -923.949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}
        SpeciesThermoaHi7 = {2.40670381, 7.44026449, -1.07502592, 6.710439, -0.445191184, 11.3049069, 13.9926204, 4.20297474, -16.8116524, 5.87189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}
        hs = {0, 0, 0, 0, 0, 0, 0, 0, 0, 0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}
        Cps = {0, 0, 0, 0, 0, 0, 0, 0, 0, 0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}
        thermo = /home/stohr.a/HAN/HAN/COMSOL/chemkin/chem_annotated-gas_really_big.inp
  tds: DilutedSpecies "Reactor Length Transport" on all domains
    dependent variable Ne = {Ne, NH3_2_, NH2OH_3_, HNO3_4_, CH3OH_5_, H2O_6_, N2_7_, O2_8_, NO2_9_, NO_10_, N2O_11, CO2_12_, H2_13, CO_14_, CH4_15_, C2H6_16_, CH2O_17_, CH3_18_, C3H8_19_, H_20_, C2H5_21_, HCO_22_, CH3CHO_23_, OH_24_, C2H4_25_, HNOH_93_, H2NO_88_, H2NO3_239_, HONO_92_, HNO_87_, N2O2_386_, NONDO_551_, HNO_490_, H3NO3_627_, ONONO_339_, CH2OH_45_, S_736_, S_1095_, NO3_95_, S_1140_, CH3O_46_, NH2_85_, OCNDO_940_, H3NO_534_, NH2NO_947_, CHNO2_393_, S_574_, S_1374_, CHNO3_368_, ONCO_525_, ONCDO_262_, NOON_585_, S_1359_, S_2370_, S_3047_, S_3054_, C2H4_200_, H2NO2_595_, HNO2_242_, NO2NO_336_, S_3478_, O_36_, HOCO_41_, HO2_39_, H2O2_40_, CH2_42_, CH2_S_43_, CH_44_, HCOH_47_, CH3OO_48_, CH2CO_49_, C2H3_50_, C_51_, C2H2_52_, C2H_53_, Ar_37_, CH3OOH_54_, CH2OOH_55_, HOCH2O_56_, HOCHO_57_, C2H5O_58_, C2H5O2_59_, C2H5O2_60_, cC2H4O_61_, CH2CHO_62_, H2CC_63_, CH3CO_64_, C2H4O_65_, C2H5O_66_, C2H3O2_67_, CHCHO_68_, OCHCHO_69_, HCCO_70_, HCCOH_71_, CHCHOH_72_, C2_73_, C2O_74_, C2H5O_76_, C2H5O3_77_, cC2H3O_78_, C2H3O3_79_, OCHCO_80_, C2H6O2_81_, C2H5O2_82_, C2H4O2_83_, OCHO_84_, NH_86_, HON_89_, N_90_, NNH_91_, N2H2_96_, H2N2_97_, N2H3_98_, N2H4_99_, HCN_100_, CN_101_, HNC_102_, NCO_103_, HOCN_104_, HNCO_105_, NCCN_106_, HNCN_107_, NCN_108_, HNCNH_109_, HCNO_110_, CH3CN_111_, CH2CN_112_, CH2NH_113_, H2CN_114_, CH3NO_115_, CH4N_116_, NCNOH_117_, NCNO_118_, CH2NO_119_, S_120_, S_121_, S_122_, S_123_, S_124_, S_125_, S_126_, S_127_, S_128_, S_129_, S_130_, S_131_, S_132_, CH5N_133_, CH3NH_134_, HCNH_135_, C2H7N_136_, C2H6N_137_, C2H6N_138_, C2H6N_139_, C2H5N_140_, C2H5N_141_, CH3NO_142_, C2H4N_143_, C2H4N_144_, C2H4N_145_, H2NCO_146_, C2H4N_147_, C2H4N_148_, C2H3N_149_, C2H3N_150_, C2H3N_151_, C2H3N_152_, CHCNH_153_, C2H3N_154_, C2H4N_155_, C2H6N_156_, C2H7N_157_, C2H6N_158_, C2H5N_159_, C2H4N_160_}
    cdm1: ConvectionDiffusionMigration "Transport Properties 1" (default) | u = {u, 0, 0}
    nflx1: NoFlux (default)
    init1: init "Initial Values 1" (default)
    in1: Inflow on no boundaries | BoundaryConditionType = FluxDanckwerts
  c: CoefficientFormPDE "Burke-Plummer Equation for Turbulent Flow through Packed Bed" on all domains
    dependent variable u
    Units.DependentVariableQuantity = pressure
    Units.CustomSourceTermUnit = N/m^3
    cfeq1: CoefficientFormPDE (default) | c = 1; f = 1; da = 1
    zflx1: ZeroFluxBoundary "Zero Flux 1" (default)
    init1: init "Initial Values 1" (default)

Mesh
  mesh1 "Mesh 1" (physics-controlled)

Studies
  std1 "Study 1"
    stat: Stationary