// COMSOL Multiphysics 5.4.0.388 model "test_reactor.mph"
// Outline of the model tree
// Components: comp1 "Component 1", comp2 "Component 2"

Parameters
  P_feed = 2[atm]  // Feed pressure
  Tr = 508[K]  // Reactor temperature
  D_CO = 0.0487[cm^2/s]  // Diffusion coefficient for CO
  D_O2 = 0.0469[cm^2/s]  // Diffusion coefficient for O2
  D_C3H6 = 0.0487[cm^2/s]  // Diffusion coefficient for C3H6
  D_CO2 = 0.0487[cm^2/s]  // Diffusion coefficient for CO2
  D_H2O = 0.0487[cm^2/s]  // Diffusion coefficient for H2O
  Mn_CO = 0.028[kg/mol]  // Molar mass for CO
  Mn_O2 = 0.032[kg/mol]  // Molar mass for O2
  Mn_C3H6 = 0.042[kg/mol]  // Molar mass for C3H6
  Mn_CO2 = 0.044[kg/mol]  // Molar mass for CO2
  Mn_H2O = 0.018[kg/mol]  // Molar mass for H2O
  Mn_N2 = 0.028[kg/mol]  // Molar mass for the inert (N2)
  E1 = 1.09e5[J/mol]  // Activation energy for R1
  E2 = 1.26e5[J/mol]  // Activation energy for R2
  A1 = 7.07e13[m^3/mol/s]  // Preexponential factor for reaction 1
  A2 = 1.47e15[m^3/mol/s]  // Preexponential factor for reaction 2
  Aco = 8.1[m^3/mol]  // Constant for adsorption term
  Ac3h6 = 257.9[m^3/mol]  // Constant for adsorption term
  Eco = -3400[J/mol]  // Activation energy for adsorption term
  Ec3h6 = 1588[J/mol]  // Activation energy for adsorption term
  u_feed = 75[cm/s]  // Linear inflow velocity
  por_b = 1-rho_b/rho_p  // Porosity of the bed (void/total)
  por_pel = 0.90  // Porosity of catalyst pellet
  rho_b = 0.51[g/cm^3]  // Density of bed
  rho_p = 0.68[g/cm^3]  // Density of pellet
  Rr = 5[cm]  // Reactor radius
  Ra = pi*Rr^2  // Reactor area
  mu = 0.028e-2[g/cm/s]  // Fluid viscosity
  rho_feed = 1.292[kg/m^3]  // Inlet gas density
  Ctot_feed = P_feed/R_const/Tr  // Total feed concentration
  x_CO_feed = 0.005  // Molar fraction of CO in feed
  x_O2_feed = 0.0075  // Molar fraction of O2 in feed
  x_C3H6_feed = 0.000125  // Molar fraction of C3H6 in feed
  Cinert_feed = (1-x_CO_feed-x_O2_feed-x_C3H6_feed)*Ctot_feed  // Concentration of inert (N2) in feed
  Ap = 3/rp  // Surface area of particles per unit volume
  rp = 0.25[cm]  // Particle radius

Variables
  var1 "Variables 1"
    Ctot = (Cinert_feed+comp1.CO+comp1.O2+comp1.CO2+comp1.C3H6+comp1.H2O)  // Total concentration
    KCO = Aco*exp(-Eco/R_const/Tr)  // Adsorption constant for CO
    KC3H6 = Ac3h6*exp(-Ec3h6/R_const/Tr)  // Adsorption constant for C3H6

Geometry
  geom1 "Geometry 1" [comp1] (1D, length unit m)
    i1: Interval | coord = {0, 0.3}
    fin: Finalize "Form Union"
  geom2 "Geometry 2" [comp2] (2D, length unit m)
    sq1: Square
    fin: Finalize "Form Union"

Physics
  tds: DilutedSpecies "Transport of Diluted Species" [geom1] on all domains
    dependent variable C3H6 = {C3H6, CO, CO2, H2O, O2}
    cdm1: ConvectionDiffusionMigration "Transport Properties 1" (default)
      u = {u, 0, 0}
      D_C3H6 = D_C3H6
      D_CO = D_CO
      D_CO2 = D_CO2
      D_H2O = D_H2O
      D_O2 = DO2
    nflx1: NoFlux (default)
    init1: init "Initial Values 1" (default) | initc = {1e-6, 1e-6, 1e-6, 1e-6, 1e-6}
    reac1: Reactions on no domains
      R_C3H6 = -Ap*C3H6flux*(1-por_b)
      R_CO = -Ap*COflux*(1-por_b)
      R_CO2 = -Ap*CO2flux(1-por_b)
      R_H2O = -Ap*H2Oflux(1-por_b)
      R_O2 = -Ap*O2flux(1-por_b)
    in1: Inflow on no boundaries
      c0 = {x_C3H6_feed*Ctot_feed, x_CO_feed*Ctot_feed, 0, 0, x_O2_feed*Ctot_feed}
      BoundaryConditionType = FluxDanckwerts
    out1: Outflow on no boundaries
  c: CoefficientFormPDE "Coefficient Form PDE: Ergun Equation" [geom1] on all domains
    dependent variable u
    Units.DependentVariableQuantity = pressure
    Units.CustomSourceTermUnit = N/m^-3
    cfeq1: CoefficientFormPDE (default)
      c = 0
      f = Px+(150*mu*u/(2*Rr)^2*(1-por_b)^2/por_b^3+1.75*rho_feed*u^2/(2*Rr)*(1-por_b)/por_b^3)
      da = 0
    zflx1: ZeroFluxBoundary "Zero Flux 1" (default)
    init1: init "Initial Values 1" (default) | u = P_feed
    dir1: DirichletBoundary "Dirichlet Boundary Condition 1" on no boundaries | r = P_feed
  chem: Chemistry [geom2] on all domains
    rch1: ReactionChem "1: CO+1/2O2<=>CO2" on all domains
      Ef = E1
      rType = rev
      ReactionExpression = UserDefined
      useArrhenius = 1
      formula = CO+1/2O2<=>CO2
      Af = A1[mol/m^3]
      r = chem.kf_1[m^3/mol]*chem.c_CO*chem.c_O2/(1+KCO*chem.c_CO+KC3H6*chem.c_C3H6)^2
    CO: SpeciesChem "Species: CO" on all domains
      sisDef = 1
      sType = volumetric
      DependentEquilibriumReaction = rch1
      sSequenceNo = 1
      SpeciesSource = Reaction
      specLabel = CO
      Tlo = 300[K]
      Tmid = 1000[K]
      Thi = 5000[K]
      h = R_const*((chem.T<=chem.Tlo_CO)*(chem.aLo6_CO+chem.Tlo_CO*(chem.aLo1_CO+0.5*chem.Tlo_CO*(chem.aLo2_CO+2*chem.Tlo_CO*(chem.aLo3_CO+0.75*chem.Tlo_CO*(chem.aLo4_CO+0.8*chem.Tlo_CO*chem.aLo5_CO))/3)))+(chem.T>chem.Tlo_CO)*(chem.T<=chem.Tmid_CO)*(chem.aLo6_CO+chem.T*(chem.aLo1_CO+0.5*chem.T*(chem.aLo2_CO+2*chem.T*(chem.aLo3_CO+0.75*chem.T*(chem.aLo4_CO+0.8*chem.T*chem.aLo5_CO))/3)))+(chem.T>chem.Tmid_CO)*(chem.T<=chem.Thi_CO)*(chem.aHi6_CO+chem.T*(chem.aHi1_CO+0.5*chem.T*(chem.aHi2_CO+2*chem.T*(chem.aHi3_CO+0.75*chem.T*(chem.aHi4_CO+0.8*chem.T*chem.aHi5_CO))/3)))+(chem.T>chem.Thi_CO)*(chem.aHi6_CO+chem.Thi_CO*(chem.aHi1_CO+0.5*chem.Thi_CO*(chem.aHi2_CO+2*chem.Thi_CO*(chem.aHi3_CO+0.75*chem.Thi_CO*(chem.aHi4_CO+0.8*chem.Thi_CO*chem.aHi5_CO))/3))))
      s = R_const*((chem.T<=chem.Tlo_CO)*(chem.aLo7_CO+chem.aLo1_CO*log(chem.T/1[K])+chem.Tlo_CO*(chem.aLo2_CO+0.5*chem.Tlo_CO*(chem.aLo3_CO+2*chem.Tlo_CO*(chem.aLo4_CO+0.75*chem.Tlo_CO*chem.aLo5_CO)/3)))+(chem.T>chem.Tlo_CO)*(chem.T<=chem.Tmid_CO)*(chem.aLo7_CO+chem.aLo1_CO*log(chem.T/1[K])+chem.T*(chem.aLo2_CO+0.5*chem.T*(chem.aLo3_CO+2*chem.T*(chem.aLo4_CO+0.75*chem.T*chem.aLo5_CO)/3)))+(chem.T>chem.Tmid_CO)*(chem.T<=chem.Thi_CO)*(chem.aHi7_CO+chem.aHi1_CO*log(chem.T/1[K])+chem.T*(chem.aHi2_CO+0.5*chem.T*(chem.aHi3_CO+2*chem.T*(chem.aHi4_CO+0.75*chem.T*chem.aHi5_CO)/3)))+(chem.T>chem.Thi_CO)*(chem.aHi7_CO+chem.aHi1_CO*log(chem.T/1[K])+chem.Thi_CO*(chem.aHi2_CO+0.5*chem.Thi_CO*(chem.aHi3_CO+2*chem.Thi_CO*(chem.aHi4_CO+0.75*chem.Thi_CO*chem.aHi5_CO)/3))))
      Cp = R_const*((chem.T<=chem.Tlo_CO)*(chem.aLo1_CO+chem.Tlo_CO*(chem.aLo2_CO+chem.Tlo_CO*(chem.aLo3_CO+chem.Tlo_CO*(chem.aLo4_CO+chem.Tlo_CO*chem.aLo5_CO))))+(chem.T>chem.Tlo_CO)*(chem.T<=chem.Tmid_CO)*(chem.aLo1_CO+chem.T*(chem.aLo2_CO+chem.T*(chem.aLo3_CO+chem.T*(chem.aLo4_CO+chem.T*chem.aLo5_CO))))+(chem.T>chem.Tmid_CO)*(chem.T<=chem.Thi_CO)*(chem.aHi1_CO+chem.T*(chem.aHi2_CO+chem.T*(chem.aHi3_CO+chem.T*(chem.aHi4_CO+chem.T*chem.aHi5_CO))))+(chem.T>chem.Thi_CO)*(chem.aHi1_CO+chem.Thi_CO*(chem.aHi2_CO+chem.Thi_CO*(chem.aHi3_CO+chem.Thi_CO*(chem.aHi4_CO+chem.Thi_CO*chem.aHi5_CO)))))
      sigma = 3.458[angstrom]
      epsilonkb = 107.4[K]
      mu = 0[C*m]
      ActivityCoefficient = 1
      speciesEnthalpy = NASA
      ReactionTagInSpecies = rch1
      updatefeat = 1
      GasThermalConductivitySel = Automatic
      GasDiffusivitySel = Automatic
      LiquidDiffusivitySel = Automatic
      k = 0.02[W/(m*K)]
      De = 1e-5[m^2/s]
      SpeciesrateSelection = Automatic
      specName = CO
      R = -chem.r_1
      Speciesrate = 0[mol/(m^3*s)]
      SpeciesrateSurf = 0[mol/(m^2*s)]
      Speciessurfacerate = 0[mol/(m^2*s)]
      typeGUIControl = volumetric
      mixtureSolvent = 1
      Dgas = 10^-5[m^2/s]
      Dliquid = 10^-8[m^2/s]
      kgas = 0.015[W/(m*K)]
      MolarMassSelection = Thermodynamics
      M = 0.032[kg/mol]
      liquidDensitySel = Thermodynamics
      rho = 1000[kg/m^3]
      LiquidThermalConductivitySel = Thermodynamics
    O2: SpeciesChem "Species: O2" on all domains
      sisDef = 1
      sType = volumetric
      sSequenceNo = 2
      SpeciesSource = Reaction
      specLabel = O2
      Tlo = 300[K]
      Tmid = 1000[K]
      Thi = 5000[K]
      h = R_const*((chem.T<=chem.Tlo_O2)*(chem.aLo6_O2+chem.Tlo_O2*(chem.aLo1_O2+0.5*chem.Tlo_O2*(chem.aLo2_O2+2*chem.Tlo_O2*(chem.aLo3_O2+0.75*chem.Tlo_O2*(chem.aLo4_O2+0.8*chem.Tlo_O2*chem.aLo5_O2))/3)))+(chem.T>chem.Tlo_O2)*(chem.T<=chem.Tmid_O2)*(chem.aLo6_O2+chem.T*(chem.aLo1_O2+0.5*chem.T*(chem.aLo2_O2+2*chem.T*(chem.aLo3_O2+0.75*chem.T*(chem.aLo4_O2+0.8*chem.T*chem.aLo5_O2))/3)))+(chem.T>chem.Tmid_O2)*(chem.T<=chem.Thi_O2)*(chem.aHi6_O2+chem.T*(chem.aHi1_O2+0.5*chem.T*(chem.aHi2_O2+2*chem.T*(chem.aHi3_O2+0.75*chem.T*(chem.aHi4_O2+0.8*chem.T*chem.aHi5_O2))/3)))+(chem.T>chem.Thi_O2)*(chem.aHi6_O2+chem.Thi_O2*(chem.aHi1_O2+0.5*chem.Thi_O2*(chem.aHi2_O2+2*chem.Thi_O2*(chem.aHi3_O2+0.75*chem.Thi_O2*(chem.aHi4_O2+0.8*chem.Thi_O2*chem.aHi5_O2))/3))))
      s = R_const*((chem.T<=chem.Tlo_O2)*(chem.aLo7_O2+chem.aLo1_O2*log(chem.T/1[K])+chem.Tlo_O2*(chem.aLo2_O2+0.5*chem.Tlo_O2*(chem.aLo3_O2+2*chem.Tlo_O2*(chem.aLo4_O2+0.75*chem.Tlo_O2*chem.aLo5_O2)/3)))+(chem.T>chem.Tlo_O2)*(chem.T<=chem.Tmid_O2)*(chem.aLo7_O2+chem.aLo1_O2*log(chem.T/1[K])+chem.T*(chem.aLo2_O2+0.5*chem.T*(chem.aLo3_O2+2*chem.T*(chem.aLo4_O2+0.75*chem.T*chem.aLo5_O2)/3)))+(chem.T>chem.Tmid_O2)*(chem.T<=chem.Thi_O2)*(chem.aHi7_O2+chem.aHi1_O2*log(chem.T/1[K])+chem.T*(chem.aHi2_O2+0.5*chem.T*(chem.aHi3_O2+2*chem.T*(chem.aHi4_O2+0.75*chem.T*chem.aHi5_O2)/3)))+(chem.T>chem.Thi_O2)*(chem.aHi7_O2+chem.aHi1_O2*log(chem.T/1[K])+chem.Thi_O2*(chem.aHi2_O2+0.5*chem.Thi_O2*(chem.aHi3_O2+2*chem.Thi_O2*(chem.aHi4_O2+0.75*chem.Thi_O2*chem.aHi5_O2)/3))))
      Cp = R_const*((chem.T<=chem.Tlo_O2)*(chem.aLo1_O2+chem.Tlo_O2*(chem.aLo2_O2+chem.Tlo_O2*(chem.aLo3_O2+chem.Tlo_O2*(chem.aLo4_O2+chem.Tlo_O2*chem.aLo5_O2))))+(chem.T>chem.Tlo_O2)*(chem.T<=chem.Tmid_O2)*(chem.aLo1_O2+chem.T*(chem.aLo2_O2+chem.T*(chem.aLo3_O2+chem.T*(chem.aLo4_O2+chem.T*chem.aLo5_O2))))+(chem.T>chem.Tmid_O2)*(chem.T<=chem.Thi_O2)*(chem.aHi1_O2+chem.T*(chem.aHi2_O2+chem.T*(chem.aHi3_O2+chem.T*(chem.aHi4_O2+chem.T*chem.aHi5_O2))))+(chem.T>chem.Thi_O2)*(chem.aHi1_O2+chem.Thi_O2*(chem.aHi2_O2+chem.Thi_O2*(chem.aHi3_O2+chem.Thi_O2*(chem.aHi4_O2+chem.Thi_O2*chem.aHi5_O2)))))
      sigma = 3.458[angstrom]
      epsilonkb = 107.4[K]
      mu = 0[C*m]
      ActivityCoefficient = 1
      speciesEnthalpy = NASA
      ReactionTagInSpecies = rch1
      updatefeat = 1
      GasThermalConductivitySel = Automatic
      GasDiffusivitySel = Automatic
      LiquidDiffusivitySel = Automatic
      k = 0.02[W/(m*K)]
      De = 1e-5[m^2/s]
      SpeciesrateSelection = Automatic
      specName = O2
      R = -0.5*chem.r_1
      Speciesrate = 0[mol/(m^3*s)]
      SpeciesrateSurf = 0[mol/(m^2*s)]
      Speciessurfacerate = 0[mol/(m^2*s)]
      typeGUIControl = volumetric
      mixtureSolvent = 1
      Dgas = 10^-5[m^2/s]
      Dliquid = 10^-8[m^2/s]
      kgas = 0.015[W/(m*K)]
      MolarMassSelection = Thermodynamics
      M = 0.032[kg/mol]
      liquidDensitySel = Thermodynamics
      rho = 1000[kg/m^3]
      LiquidThermalConductivitySel = Thermodynamics
    CO2: SpeciesChem "Species: CO2" on all domains
      sisDef = 1
      sType = volumetric
      sSequenceNo = 3
      SpeciesSource = Reaction
      specLabel = CO2
      Tlo = 300[K]
      Tmid = 1000[K]
      Thi = 5000[K]
      h = R_const*((chem.T<=chem.Tlo_CO2)*(chem.aLo6_CO2+chem.Tlo_CO2*(chem.aLo1_CO2+0.5*chem.Tlo_CO2*(chem.aLo2_CO2+2*chem.Tlo_CO2*(chem.aLo3_CO2+0.75*chem.Tlo_CO2*(chem.aLo4_CO2+0.8*chem.Tlo_CO2*chem.aLo5_CO2))/3)))+(chem.T>chem.Tlo_CO2)*(chem.T<=chem.Tmid_CO2)*(chem.aLo6_CO2+chem.T*(chem.aLo1_CO2+0.5*chem.T*(chem.aLo2_CO2+2*chem.T*(chem.aLo3_CO2+0.75*chem.T*(chem.aLo4_CO2+0.8*chem.T*chem.aLo5_CO2))/3)))+(chem.T>chem.Tmid_CO2)*(chem.T<=chem.Thi_CO2)*(chem.aHi6_CO2+chem.T*(chem.aHi1_CO2+0.5*chem.T*(chem.aHi2_CO2+2*chem.T*(chem.aHi3_CO2+0.75*chem.T*(chem.aHi4_CO2+0.8*chem.T*chem.aHi5_CO2))/3)))+(chem.T>chem.Thi_CO2)*(chem.aHi6_CO2+chem.Thi_CO2*(chem.aHi1_CO2+0.5*chem.Thi_CO2*(chem.aHi2_CO2+2*chem.Thi_CO2*(chem.aHi3_CO2+0.75*chem.Thi_CO2*(chem.aHi4_CO2+0.8*chem.Thi_CO2*chem.aHi5_CO2))/3))))
      s = R_const*((chem.T<=chem.Tlo_CO2)*(chem.aLo7_CO2+chem.aLo1_CO2*log(chem.T/1[K])+chem.Tlo_CO2*(chem.aLo2_CO2+0.5*chem.Tlo_CO2*(chem.aLo3_CO2+2*chem.Tlo_CO2*(chem.aLo4_CO2+0.75*chem.Tlo_CO2*chem.aLo5_CO2)/3)))+(chem.T>chem.Tlo_CO2)*(chem.T<=chem.Tmid_CO2)*(chem.aLo7_CO2+chem.aLo1_CO2*log(chem.T/1[K])+chem.T*(chem.aLo2_CO2+0.5*chem.T*(chem.aLo3_CO2+2*chem.T*(chem.aLo4_CO2+0.75*chem.T*chem.aLo5_CO2)/3)))+(chem.T>chem.Tmid_CO2)*(chem.T<=chem.Thi_CO2)*(chem.aHi7_CO2+chem.aHi1_CO2*log(chem.T/1[K])+chem.T*(chem.aHi2_CO2+0.5*chem.T*(chem.aHi3_CO2+2*chem.T*(chem.aHi4_CO2+0.75*chem.T*chem.aHi5_CO2)/3)))+(chem.T>chem.Thi_CO2)*(chem.aHi7_CO2+chem.aHi1_CO2*log(chem.T/1[K])+chem.Thi_CO2*(chem.aHi2_CO2+0.5*chem.Thi_CO2*(chem.aHi3_CO2+2*chem.Thi_CO2*(chem.aHi4_CO2+0.75*chem.Thi_CO2*chem.aHi5_CO2)/3))))
      Cp = R_const*((chem.T<=chem.Tlo_CO2)*(chem.aLo1_CO2+chem.Tlo_CO2*(chem.aLo2_CO2+chem.Tlo_CO2*(chem.aLo3_CO2+chem.Tlo_CO2*(chem.aLo4_CO2+chem.Tlo_CO2*chem.aLo5_CO2))))+(chem.T>chem.Tlo_CO2)*(chem.T<=chem.Tmid_CO2)*(chem.aLo1_CO2+chem.T*(chem.aLo2_CO2+chem.T*(chem.aLo3_CO2+chem.T*(chem.aLo4_CO2+chem.T*chem.aLo5_CO2))))+(chem.T>chem.Tmid_CO2)*(chem.T<=chem.Thi_CO2)*(chem.aHi1_CO2+chem.T*(chem.aHi2_CO2+chem.T*(chem.aHi3_CO2+chem.T*(chem.aHi4_CO2+chem.T*chem.aHi5_CO2))))+(chem.T>chem.Thi_CO2)*(chem.aHi1_CO2+chem.Thi_CO2*(chem.aHi2_CO2+chem.Thi_CO2*(chem.aHi3_CO2+chem.Thi_CO2*(chem.aHi4_CO2+chem.Thi_CO2*chem.aHi5_CO2)))))
      sigma = 3.458[angstrom]
      epsilonkb = 107.4[K]
      mu = 0[C*m]
      ActivityCoefficient = 1
      speciesEnthalpy = NASA
      ReactionTagInSpecies = rch1
      updatefeat = 1
      GasThermalConductivitySel = Automatic
      GasDiffusivitySel = Automatic
      LiquidDiffusivitySel = Automatic
      k = 0.02[W/(m*K)]
      De = 1e-5[m^2/s]
      SpeciesrateSelection = Automatic
      specName = CO2
      R = chem.r_1
      Speciesrate = 0[mol/(m^3*s)]
      SpeciesrateSurf = 0[mol/(m^2*s)]
      Speciessurfacerate = 0[mol/(m^2*s)]
      typeGUIControl = volumetric
      mixtureSolvent = 1
      Dgas = 10^-5[m^2/s]
      Dliquid = 10^-8[m^2/s]
      kgas = 0.015[W/(m*K)]
      MolarMassSelection = Thermodynamics
      M = 0.032[kg/mol]
      liquidDensitySel = Thermodynamics
      rho = 1000[kg/m^3]
      LiquidThermalConductivitySel = Thermodynamics
  tds2: DilutedSpecies "Transport of Diluted Species 2" [geom2] on all domains
    dependent variable C3H6p = {C3H6p, COp, CO2p, H2Op, O2p}
    cdm1: ConvectionDiffusionMigration "Transport Properties 1" (default)
    nflx1: NoFlux (default)
    init1: init "Initial Values 1" (default)

Mesh
  mesh1 "Mesh 1" [geom1] (physics-controlled)
  mesh2 "Mesh 2" [geom2] (physics-controlled)

Studies
  std1 "Study 1"
    stat: Stationary